VAX := READPRN("C:\Users\Dubok\Downloads\circuit2.DNO")
VAX[:, 0] = [
    0; 0.02; 0.04; 0.06; 0.08; 0.1; 0.12; 0.14; 0.16; 0.18
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]
VAX[:, 1] = [
    0; 4e-6; 8e-6; 1.2e-5; 1.6e-5; 2e-5; 2.4e-5; 2.8e-5; 3.2e-5; 3.6e-5
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]
VAX = [
    0, 0;
    0.02, 4e-6;
    0.04, 8e-6;
    0.06, 1.2e-5;
    0.08, 1.6e-5;
    0.1, 2e-5;
    0.12, 2.4e-5;
    0.14, 2.8e-5;
    0.16, 3.2e-5;
    0.18, 3.6e-5
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]
Id1 := 0.028849
Id2 := 0.064619
Id3 := 0.12183
Ud1 := 0.62873
Ud2 := 0.72449
Ud3 := 0.86168
Rb := (Ud1 - 2*Ud2 + Ud3)/Id1
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Rb = 1.4361
NFt := ((3*Ud2 - 2*Ud1) - Ud3)/ln(2)
NFt = 0.0783816
Io := Id1*exp((Ud3 - 2*Ud2)/NFt)
Io = 1.60708e-5
Rb1 := 1
Is01 := 0.0000001
m := 2
Ft := 0.02
Given
0.481 == 1.352*10^-3*Rb1 + ln((Is01 + 1.352*10^-3)/Is01)*m*Ft
0.42 == 2.274*10^-4*Rb1 + ln((Is01 + 2.274*10^-4)/Is01)*m*Ft
VAX = [
    0, 0;
    0.02, 4e-6;
    0.04, 8e-6;
    0.06, 1.2e-5;
    0.08, 1.6e-5;
    0.1, 2e-5;
    0.12, 2.4e-5;
    0.14, 2.8e-5;
    0.16, 3.2e-5;
    0.18, 3.6e-5
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]
0.525 == 5.033*10^-3*Rb1 + ln((Is01 + 5.033*10^-3)/Is01)*m*Ft
0.573 == 0.013*Rb1 + ln((Is01 + 0.013)/Is01)*m*Ft
Diod_P := Minerr(Is01, Rb1, m, Ft)
Diod_P = [3.28209e-10; 1.97104; 1.84932; 0.016901]
Is01 := 4.641*10^-12
Rb1 := 2.114
m := 1.585
Ft := 0.016
Idiod := 0, 10^-6 .. 0.282
Idiod =  # no stored result
Udiod(Idiod) := Idiod*Rb1 + m*Ft*ln((Idiod + Is01)/Is01)
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