# [component: outputs Fmax]
# [component: outputs Vvar]
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0
pi := 3.14
Ck := 10^-10
Lk := 10^-3
Cd := -(Ck*Lk - 1/(4*Fmax^2*pi^2))/Lk
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Cd = [1.19394e-10; 9.28152e-11; 8.20392e-11; 7.5505e-11; 7.09621e-11; 6.74937e-11; 6.46798e-11; 6.24532e-11; 6.05199e-11; 5.88671e-11; 5.78516e-11]
CJ0 := 160*10^-12
VJ0 := 0.8
M := 0.5
Given
1.194*10^-10 == CJ0*(1 - (-1/VJ0))^(-M)
8.204*10^-11 == CJ0*(1 - (-7/VJ0))^(-M)
7.096*10^-11 == CJ0*(1 - (-13/VJ0))^(-M)
6.052*10^-11 == CJ0*(1 - (-25/VJ0))^(-M)
Result := Minerr(CJ0, VJ0, M)
Result = [1.47441e-10; 0.771479; 0.253772]
