M := READPRN("C:\Users\Dubok\Documents\Элтех\Лаба 3\Design3.csv")
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M = [
    -0.998938, 1.03822e-8;
    -0.99506, 8.37572e-8;
    -0.988336, 7.9588e-8;
    -0.978802, 1.52331e-7;
    -0.966469, 1.48163e-7;
    -0.951388, 2.2004e-7;
    -0.933587, 2.15648e-7;
    -0.91313, 2.86454e-7;
    -0.890062, 2.8162e-7;
    -0.864464, 3.51118e-7
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]
RbE := 2.107
IsE := 8.178*10^-12
mE := 1.642
FtE := 0.016
Given
[0.511] == [3.128*10^-3]*RbE + ln((IsE + [3.128*10^-3])/IsE)*mE*FtE
[0.498] == [1.892*10^-3]*RbE + ln((IsE + [1.892*10^-3])/IsE)*mE*FtE
[0.376] == [1.533*10^-5]*RbE + ln((IsE + [1.533*10^-5])/IsE)*mE*FtE
[0.391] == [3.246*10^-5]*RbE + ln((IsE + [3.246*10^-5])/IsE)*mE*FtE
DiodE := Minerr(IsE, RbE, mE, FtE)
DiodE = [4.47884e-12; 1.5696; 1.75731; 0.014157]
Idiod := 0, 10^-5 .. 0.005
Udiod(Idiod) := Idiod*RbE + mE*FtE*ln((Idiod + IsE)/IsE)
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