Fres := [319779; 373737; 387144; 394611; 400042; 403776]
V2 := [0; -7.2; -14.4; -21.6; -28.8; -36]
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Lk := 10^-3
Ck := 10^-10
pi := 3.14159
Cd := -(Ck*Lk - 1/(4*Fres^2*pi^2))/Lk
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Cd = [1.47709e-10; 8.13463e-11; 6.90036e-11; 6.26682e-11; 5.82814e-11; 5.53674e-11]
M := 0.25
VJ0 := 0.75
CJ0 := 15^-11
Given
1.477*10^-10 == CJ0*(1 - 0/VJ0)^(-M)
6.9*10^-11 == CJ0*(1 - (-14.4/VJ0))^(-M)
5.537*10^-11 == CJ0*(1 - (-36/VJ0))^(-M)
Result := Minerr(CJ0, VJ0, M)
Result = [1.477e-10; 0.70005; 0.247803]
